// COMSOL Multiphysics 5.6.0.280 model "3D_Asymmetric_tilted.mph"
// Outline of the model tree

Parameters
  D_drop = 1.3[mm]  // Droplet diameter
  AR_drop = 1.5  // aspect ratio
  V_drop = pi/6*D_drop^3  // Droplet volume
  d1_drop = (6*V_drop/pi/AR_drop)^(1/3)
  d2_drop = AR_drop*d1_drop
  tilt_angle = 20  // Droplet tilt angle

Common definitions
  free1: DeformingDomain on domains 1, 2

Geometry
  geom1 "Geometry" (3D, length unit m)
    cyl1: Cylinder | pos = {0, 0, -1.5*D_drop-0.002}; r = 3*D_drop/2; h = 3*D_drop+0.002
    wp1: WorkPlane | quickplane = yz; unite = on
      sq1: Square (disabled) | pos = {-D_drop*1.5, -D_drop*1.5}; size = D_drop*3
      r1: Rectangle | pos = {-D_drop*1.5, -D_drop*1.5-0.002}; size = {D_drop*3, D_drop*3+0.002}
    wp4: WorkPlane | quickplane = xz; unite = on
      e1: Ellipse | pos = {0, -5e-4}; semiaxes = {d1_drop/2, d2_drop/2*1.5}; angle = 180
      e2: Ellipse | pos = {0, -5e-4}; rot = 180; semiaxes = {d1_drop/2, d2_drop/2*0.5}; angle = 180
      r1: Rectangle | pos = {-40e-4, -20e-4}; size = {40e-4, 40e-4}
      dif1: Difference | input = e1, e2; input2 = r1; intbnd = off; edge = all
    rev1: Revolve | workplane = wp4; input = wp4; angtype = full; origfaces = off
    rot1: Rotate | input = rev1; axistype = x; rot = tilt_angle
    fin: Finalize "Form Union"

Materials
  mat1: Common "Copper" (disabled) on no domains
    def "Basic"
      relpermeability = 1
      electricconductivity = 5.998e7[S/m]
      thermalexpansioncoefficient = 17e-6[1/K]
      heatcapacity = 385[J/(kg*K)]
      relpermittivity = 1
      density = 8960[kg/m^3]
      thermalconductivity = 400[W/(m*K)]
      dynamicviscosity = 4e-3
    Enu "Young's modulus and Poisson's ratio"
      youngsmodulus = 110e9[Pa]
      poissonsratio = 0.35
    linzRes "Linearized resistivity"
      rho0 = 1.72e-8[ohm*m]
      alpha = 0.0039[1/K]
      Tref = 298[K]
  mat2: Common "Nitrogen" on domains 1
    def "Basic"
      dynamicviscosity = eta(T)
      ratioofspecificheat = 1.4
      heatcapacity = Cp(T)
      density = rho(pA,T)
      thermalconductivity = k(T)
      eta: Piecewise | arg = T; pieces = {200.0, 1200.0, 1.77230303E-6+6.27427545E-8*T^1-3.47278555E-11*T^2+1.01243201E-14*T^3}; argunit = K; fununit = Pa*s
      Cp: Piecewise | arg = T; pieces = {200.0, 1200.0, 1088.22121-0.365941919*T^1+7.88715035E-4*T^2-3.749223E-7*T^3+3.17599068E-11*T^4}; argunit = K; fununit = J/(kg*K)
      rho: Analytic | expr = pA*0.02801/R_const[K*mol/J]/T; args = {pA, T}; dermethod = manual; argders = {{pA, d(pA*0.02801/R_const/T,pA)}, {T, d(pA*0.02801/R_const/T,T)}}; argunit = Pa,K; fununit = kg/m^3
      k: Piecewise | arg = T; pieces = {200.0, 1200.0, 3.6969697E-4+9.74353924E-5*T^1-4.07587413E-8*T^2+7.68453768E-12*T^3}; argunit = K; fununit = W/(m*K)
    idealGas
      Rs = R_const/Mn
      heatcapacity = Cp(T)
      ratioofspecificheat = 1.4
      molarmass = 0.02801
      Cp: Piecewise | arg = T; pieces = {200.0, 1200.0, 1088.22121-0.365941919*T^1+7.88715035E-4*T^2-3.749223E-7*T^3+3.17599068E-11*T^4}; argunit = K; fununit = J/(kg*K)

Physics
  spf: LaminarFlow on domains 1, 2
    dependent variable u = {u, v, w}
    PhysicalModelProperty.Compressibility = Incompressible
    PhysicalModelProperty.IncludeGravity = 1
    PhysicalModelProperty.pref = 1[bar]
    ConsistentStabilization.CrosswindDiffusion = 0
    fp1: FluidProperties "Fluid Properties - N2" (default)
    init1: init "Initial Values - N2" (default) | p_init = 1[bar]
    wallbc1: WallBC "No walls" (default)
    grav1: Gravity
    ffi1: FluidFluidInterface "Fluid-Fluid Interface (Copper - N2)" on boundaries 1-8, 10-12, 14-18
      SurfaceTensionCoefficient = userdef
      sigma = 1.29[N/m]
      cnta1: ContactAngle (default)
    sym1: Symmetry on boundaries 9, 13
    open1: OpenBoundary "Open Boundary (@ outer domain edges)" on boundaries 1-4, 10-12, 18
    fp2: FluidProperties "Fluid Properties - Copper" on domains 2
      rho_mat = userdef
      rho = 7900[kg/m^3]
      Constitutiverelation = Newtonian
      mu_mat = userdef
      mu = 4e-3[Pa*s]

Mesh
  mesh2 "Mesh"
    size: MeshSizeDefault "Size (@Domain)" | hmax = 2.76E-4/2; hmin = 8.27E-6; hgrad = 1.06; hauto = 6
    size1: Size "Size (@ Interface)" on boundaries 5-8 | hmax = 2.76E-4/2/2; custom = on
    ftet1: FreeTet "Free Tetrahedral 1" on domains 1, 2

Studies
  std1 "Study 1"
    time: Transient "Time Dependent" | tlist = range(0,(20[ms]-0)/999,20[ms])

Solver configurations
  sol1 "Solution 1" (study std1)
    v1: Variables "Dependent Variables 1"
      comp1_spatial_disp: Field "Spatial mesh displacement (comp1.spatial.disp)"
        scalemethod = manual
        scaleval = 4.12821791035e-05
    t1: Time "Time-Dependent Solver 1"
      tlist = range(0,(20[ms]-0)/999,20[ms])
      rtol = 0.005
      atolglobalfactor = 0.05
      atolmethod = {comp1_p, scaled, comp1_spatial_disp, global, comp1_spatial_lm_nv, global, comp1_u, global}
      atolvaluemethod = {comp1_p, factor, comp1_spatial_disp, factor, comp1_spatial_lm_nv, factor, comp1_u, factor}
      atolfactor = {comp1_p, 1, comp1_spatial_disp, 0.1, comp1_spatial_lm_nv, 0.1, comp1_u, 0.1}
      initialstepbdf = 10e-12
      maxstepconstraintbdf = expr
      maxorder = 1
      stabcntrl = on
      bwinitstepfrac = 0.01
      estrat = exclude
      rhoinf = 0.5
      predictor = constant
      se1: Segregated | maxsegiter = 1000; ntolfact = 0.5; segstabacc = segaacc; segaaccdim = 5
        ss1: SegregatedStep "Velocity u, Pressure p"
          segvar = {comp1_u, comp1_p}
          linsolver = d1
          subdamp = 0.8
          subjtech = once
        ss2: SegregatedStep "Spatial mesh displacement"
          segvar = {comp1_spatial_disp, comp1_spatial_lm_nv}
          linsolver = d2
          subdamp = 0.8
          subjtech = onevery
          subntolfact = 0.1
      d1: Direct "Direct, fluid flow variables (spf)" | linsolver = pardiso; pivotperturb = 1.0E-13
      d2: Direct "Direct, spatial mesh displacement" | linsolver = pardiso; pivotperturb = 1.0E-13

Datasets
  dset1: Solution | solution = sol1
  surf1: Surface | data = dset1
  mir1: Mirror3D (disabled) | data = surf1

Derived values
  int3: IntVolume "Volume" on domains 2, 4 | data = dset1; table = new; expr = 2; descr = Volume
  pev1: EvalPoint "Point Evaluation 1" on points 3, 7, 8, 12
    data = dset1
    table = new
    expr = {x, y, z}
    unit = {mm, mm, mm}
  int14: IntSurface "Surface Integration xz" | data = dset1; table = new; expr = 1; descr = Projection area
  int15: IntSurface "Surface Integration yz" | data = dset1; table = new; expr = 1; descr = Projection area
  int16: IntSurface "Surface Integration xy" | data = dset1; table = new; expr = 1; descr = Projection area

Plots
  pg1: PlotGroup3D "Velocity (spf)" on all domains | data = dset1
    slc1: Slice (disabled) | data = dset1; expr = spf.U
    con1: Contour (disabled) | data = dset1; expr = spf.U
    surf1: Surface | data = dset1; expr = spf.U
  pg3: PlotGroup3D "3D Plot Group 3" | data = surf1
    surf1: Surface | data = dset1; expr = spf.U
  pg7: PlotGroup3D "3D Plot Group 7" | data = dset1
    vol1: Volume | expr = spf.U
      tran1: Transparency
      sel1: Selection
    vol2: Volume | expr = spf.U
      sel1: Selection

Exports
  anim1: Animation
    type = imageseq
    movietype = avi
    avifilename = /share/Kiana/Comsol/movie/Tropfen1.avi
    aviqual = 1
    framesel = all
    maxframes = 1000